*Heading
** Job name: Plate_With_Notch Model name: Model-1
** Generated by: Abaqus/CAE 6.13-2
**Preprint, echo=NO, model=NO, history=NO, contact=NO
**
** PARTS
**
*Part, name=PlatewithNotch
*End Part
**
**
** ASSEMBLY
**
*Assembly, name=Assembly
**
*Instance, name=PlatewithNotch1, part=PlatewithNotch
*Node, nset=allnodes
      1,           0.,        13.75,          21.
      2,           0.,        28.75,          21.
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*USER ELEMENT, TYPE=U1, NODES=8, COORDINATES=3, PROPERTIES=17, VARIABLES=288, UNSYM
1, 2, 3, 9, 11,12,13
*Element, TYPE=U1, ELSET=set-1
1,  38, 109, 111,  37,   1,  29,  32,   4
2, 109, 110, 112, 111,  29,  30,  31,  32
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*UEL PROPERTY, ELSET=set-1
** Only 8 entries per line
1766.0, 802.0, 1124.0,0.099,1.6, 0.0, 0.8, 0.8
63.3,2.6, 41.6, -1.0, -0.24, 2.5, 0.49, 1.2
-7.0
*End Instance
**
*Nset, nset=BottomNodes, instance=PlatewithNotch1
  18,  19,  21,  22,  56,  57
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*Nset, nset=CenterNodeBottom, instance=PlatewithNotch1
 169
*Nset, nset=CenterNodeBottomFace, instance=PlatewithNotch1
 59,72
*Nset, nset=LeftNodes, instance=PlatewithNotch1
   9,  12,  15,  16,  19,  22
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*Nset, nset=RightNodes, instance=PlatewithNotch1
   2,   3,   5,   6,  18,  21
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*Nset, nset=TopNodes, instance=PlatewithNotch1
  23,  24,  26,  27,  84,  85
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*NSET, NSET=Polarization, instance=PlatewithNotch1,GENERATE
1, 270
*End Assembly
** PREDEFINED FIELDS
*Initial Conditions, type=TEMPERATURE
Polarization,0.0,1.0,0.0
** ----------------------------------------------------------------
**
** STEP: Step-1
**
*Step, name=Step-1, nlgeom=NO
*Static
0.1, 1., 1e-07, 0.1
** BOUNDARY CONDITIONS
**
** Name: BC-1 Type: Displacement/Rotation
*Boundary
TopNodes,3,3,0.4
*Boundary
CenterNodeBottom,3,3
*Boundary
RightNodes, 9, 9
** OUTPUT REQUESTS
*Restart, write, frequency=0
**
** FIELD OUTPUT: F-Output-1
**
*Output, field
*Node Output
U,NT, EPOT, RCHG, RF
*Element Output, directions=YES
ECD, EFLX, EPG, LE, NCURS, PE, PEEQ, PEMAG, S
**
*ENERGY FILE, FREQUENCY=1
*FILE FORMAT, ZERO INCREMENT
*EL FILE, FREQUENCY=1
SDV
*NODE FILE, FREQUENCY=1
U,NT, EPOT
*End Step
